# LT3798
# Isolated No Opto-Coupler Flyback Controller with Active PFC
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# Transformer
Lpri := 300 μH
Lleakage := 1.6 μH
NPS := 4
NST := 1
Vout := 24 V
Iout := 2 A
# Startup
# Setting the VIN Turn-On and Turn-Off Voltages
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R1 := 2.4 MΩ
R2 := 301 kΩ
VIN_UVLO_RISING := 1.25 V*(R1 + R2)/R2 + 10 μA*R1 = 35.2168 V
VIN_UVLO_FALLING := 1.25 V*(R1 + R2)/R2 = 11.2168 V
# Programming Output Voltage
R4 := NST*1/(12.4 nA)*0.00124 V = 100 kΩ
VBG := 1.25 V
ITC := 4.25 μA
Vf := 0.3 V
R5 := (VBG*R4)/(NST*(Vout + Vf) + R4*ITC - VBG) = 5.32481 kΩ
# Programming Output Current
